# originally written by Manyi Yang, modified by Francesco Mambretti
# 17/02/2023 version

###################################################################
variable 				p_id world ".0."  #".1."  ".2." ".3."
variable        NSTEPS1          equal 400000 #equilibration
variable        NSTEPS2          equal 4000000 #production
variable        THERMO_FREQ     equal 4000
variable        aveStep1        equal 1
variable        aveStep2        equal 4000
variable        DUMP_FREQ       equal 2000
variable 				MOD_OUT_FREQ		equal 2000
variable        TEMP            equal 750 #K
variable				SEED1           equal $SEED1
variable				SEED2           equal $SEED2
variable        dt              equal 0.00025 #ps, i.e. 1000*fs
variable        TAU_T           equal 0.02

###################################################################
units           metal
boundary        p p p
restart 				${NSTEPS2} lmp.restart
atom_style      atomic
neigh_modify    delay 10 every 1

# TIMESTEP
timestep	${dt}  #ps

###################################################################
#read_restart    lmp.restart
read_data        Li2NH_256_$N_NH2.lmp

mass	1       1.00784
mass	2				14.0067
mass  3				6.94100

###################################################################
variable	potential_path	string /work/fmambretti/lithium_imide_amide/NN/adding_256_with_NH2/

pair_style deepmd ${potential_path}/new_raw/tr-all-1/frozen_model_compressed.pb ${potential_path}/new_raw/tr-all-2/frozen_model_compressed.pb ${potential_path}/new_raw/tr-all-3/frozen_model_compressed.pb ${potential_path}/new_raw/tr-all-4/frozen_model_compressed.pb out_freq ${MOD_OUT_FREQ} out_file model_devi.out

pair_coeff  * *

###################################################################
#msd calculation
group Li type 3
group NH type 1 2
group H type 1
group N type 2
compute msdLi Li msd com yes
compute msdNH NH msd com yes
compute msdN N msd com yes
compute msdH H msd com yes
fix 10 Li ave/time ${THERMO_FREQ} 1 ${THERMO_FREQ}  c_msdLi[*] file msd_Li.dat
fix 11 Li vector  ${THERMO_FREQ}  c_msdLi[4]
fix 12 NH ave/time ${THERMO_FREQ} 1 ${THERMO_FREQ}  c_msdNH[*] file msd_NH.dat
fix 13 NH vector  ${THERMO_FREQ}  c_msdNH[4]
fix 14 H ave/time ${THERMO_FREQ} 1 ${THERMO_FREQ}  c_msdH[*] file msd_H.dat
fix 15 H vector  ${THERMO_FREQ}  c_msdH[4]
fix 16 N ave/time ${THERMO_FREQ} 1 ${THERMO_FREQ}  c_msdN[*] file msd_N.dat
fix 17 N vector  ${THERMO_FREQ}  c_msdN[4]
variable  fitslopeLi equal slope(f_11)/6/(${THERMO_FREQ}*${dt})
variable  fitslopeNH equal slope(f_13)/6/(${THERMO_FREQ}*${dt})
variable  fitslopeN equal slope(f_15)/6/(${THERMO_FREQ}*${dt})
variable  fitslopeH equal slope(f_17)/6/(${THERMO_FREQ}*${dt})

###################################################################
#thermo
thermo          ${THERMO_FREQ}
thermo_style    custom step temp pe ke etotal press vol lx ly lz  c_msdLi[4]  v_fitslopeLi c_msdNH[4]  v_fitslopeNH c_msdH[4]  v_fitslopeH c_msdN[4]  v_fitslopeN
thermo_modify 	flush yes

###################################################################
###### equil - NVT
#reset_timestep         0

dump            init_conf all xyz ${NSTEPS1} dump.0.xyz
dump_modify     init_conf element H N Li sort id

velocity        all create ${TEMP} ${SEED1} dist gaussian
#fix             dpgen_plm all plumed plumedfile plumed_unbiased.dat outfile output.plumed
fix             1 all nve
fix             2 all temp/csvr ${TEMP} ${TEMP} ${TAU_T} ${SEED1}

run             ${NSTEPS1}
#unfix dpgen_plm
unfix 1
unfix 2
undump	init_conf

###################################################################
# DUMP
shell mkdir dump
#dump            2 all custom ${DUMP_FREQ} unwrap_xyz element  xu yu zu
#dump_modify			2 append yes element H N Li sort id
dump						myDump all xyz ${DUMP_FREQ} dump/dump.*.xyz
dump_modify			myDump append yes element H N Li
dump            myDump3 all atom ${DUMP_FREQ} dump.lammpstrj
dump_modify     myDump3 append yes sort id

###################################################################
## Production - NVT
#velocity        all create ${TEMP} ${SEED2} dist gaussian
#fix            dpgen_plm all plumed plumedfile plumed.dat  outfile output.plumed
fix             1 all nve
fix             2 all temp/csvr ${TEMP} ${TEMP} ${TAU_T} ${SEED2}
run             ${NSTEPS2}
# ---------- End ---------------------
